** Job name: Dynamic-2 Model name: Dynamic
*Part, name="Cross brace"
*Node
      1,   2.66666675,   1.16666663,   1.70000005
      2,   2.66666675,   1.16666663,  0.300000012
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*Element, type=B33
1, 1, 2
2, 3, 1
3, 4, 3
4, 5, 6
5, 6, 7
6, 8, 5
7, 9, 8
8, 10,  9
*Nset, nset=_PickedSet2, internal, generate
  1,  10,   1
*Elset, elset=_PickedSet2, internal, generate
 1,  8,  1
** Section: BracingSection  Profile: BraceBoxProfile
*Beam General Section, elset=_PickedSet2, poisson = 0.3, density=7800, section=BOX
3e-2, 3e-2, 3e-3, 3e-3, 3e-3, 3e-3
0.,1.,0.
 21E+10, 81E+9
*End Part
**
*Part, name=Truss
*Node
      1,           4.,         0.75,  0.449999988
      2,           6.,        1.125,  0.675000012
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*Element, type=B33
1,  1, 17
2, 17,  2
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*Node
     39,           0.,           0.,           0.
*Nset, nset=Truss-RefPt_, internal
39,
*Nset, nset=_PickedSet12, internal
  1,  2,  3,  5,  7,  8,  9, 10, 11, 13, 15, 16, 23, 34
*Elset, elset=_PickedSet12, internal
  3, 13, 14, 15, 16, 17, 26, 36, 37, 38, 39, 40
*Nset, nset=_PickedSet13, internal
  1,  2,  3,  4,  5,  6
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*Elset, elset=_PickedSet13, internal
  1,  2,  4,  5,  6,  7
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** Region: (MainMemberSection:Picked), (Beam Orientation:Picked)
*Elset, elset=_I1, internal
  1,  2,  4,  5,  6,  7
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** Section: MainMemberSection  Profile: MainBoxProfile
*Beam General Section, elset=_I1, poisson = 0.3, density=7800, section=BOX
1e-1, 6e-2, 6e-3, 6e-3, 6e-3, 6e-3
-0.1118,0.,0.9936
 21E+10, 81E+9
** Region: (BracingSection:Picked), (Beam Orientation:Picked)
*Elset, elset=_I2, internal
  3, 13, 14, 15, 16, 17
** Section: BracingSection  Profile: BraceBoxProfile
*Beam General Section, elset=_I2, poisson = 0.3, density=7800, section=BOX
3e-2, 3e-2, 3e-3, 3e-3, 3e-3, 3e-3
-0.1118,0.,0.9936
 21E+10, 81E+9
** Region: (MainMemberSection:Picked), (Beam Orientation:Picked)
*Elset, elset=_I3, internal
 24, 25, 27, 28, 29, 30
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** Section: MainMemberSection  Profile: MainBoxProfile
*Beam General Section, elset=_I3, poisson = 0.3, density=7800, section=BOX
1e-1, 6e-2, 6e-3, 6e-3, 6e-3, 6e-3
-0.1118,0.,-0.9936
 21E+10, 81E+9
** Region: (BracingSection:Picked), (Beam Orientation:Picked)
*Elset, elset=_I4, internal
 26, 36, 37, 38, 39, 40
** Section: BracingSection  Profile: BraceBoxProfile
*Beam General Section, elset=_I4, poisson = 0.3, density=7800, section=BOX
3e-2, 3e-2, 3e-3, 3e-3, 3e-3, 3e-3
-0.1118,0.,-0.9936
 21E+10, 81E+9
*End Part
**
**
** ASSEMBLY
**
*Assembly, name=Assembly
**
*Instance, name=Truss-1, part=Truss
          0.,         -0.5,          -1.
*End Instance
**
*Instance, name="Cross brace-1", part="Cross brace"
          0.,         -0.5,          -1.
*End Instance
**
*Element, type=CONN3D2
1, "Cross brace-1".6, Truss-1.10
2, "Cross brace-1".7, Truss-1.2
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*Connector Section, elset=Wire-1-Edge-1
Join,
*Nset, nset=Attach, instance=Truss-1
  6,  8, 14, 16
*Nset, nset=Inner-a, instance=Truss-1
  9, 11
*Elset, elset=Inner-a, instance=Truss-1
 36,
*Nset, nset=Inner-b, instance=Truss-1
 1, 3
*Elset, elset=Inner-b, instance=Truss-1
 13,
*Nset, nset=Leg-a, instance=Truss-1
 10, 12, 31
*Elset, elset=Leg-a, instance=Truss-1
 30, 31
*Nset, nset=Leg-b, instance=Truss-1
  2,  4, 20
*Elset, elset=Leg-b, instance=Truss-1
 7, 8
*Nset, nset=Tip-a, instance=Truss-1
 12,
*Nset, nset=Tip-b, instance=Truss-1
 4,
*Nset, nset=Wire-1-Edge-1, instance="Cross brace-1", generate
  1,  10,   1
*Nset, nset=Wire-1-Edge-1, instance=Truss-1
  1,  2,  3,  5,  7,  9, 10, 11, 13, 15
*Elset, elset=Wire-1-Edge-1, generate
  1,  10,   1
** Constraint: TipConstraint-1
*Equation
2
Tip-a, 1, 1.
Tip-b, 1, -1.
** Constraint: TipConstraint-2
*Equation
2
Tip-a, 2, 1.
Tip-b, 2, -1.
*NORMAL, TYPE=ELEMENT
Inner-a,  Inner-a, -0.3962,  0.9171,  0.0446
Inner-b,  Inner-b,  0.3962, -0.9171,  0.0446
Leg-a,    Leg-a,   -0.1820,  0.9829,  0.0205
Leg-b,    Leg-b,    0.1820, -0.9829,  0.0205
*End Assembly
*Amplitude, name=Bounce, smooth=0.25
             0.,              0.,            0.01,              1.,             0.2,              1.,            0.21,              0.
** ----------------------------------------------------------------
**
** STEP: Extract Frequency
**
*Step, name="Extract Frequency", nlgeom=NO, perturbation
*Frequency, eigensolver=Lanczos, sim=NO, acoustic coupling=on, normalization=displacement
30, , , , ,
**
** BOUNDARY CONDITIONS
**
** Name: Fixed end Type: Symmetry/Antisymmetry/Encastre
*Boundary
Attach, ENCASTRE
**
** OUTPUT REQUESTS
**
*Restart, write, frequency=0
**
** FIELD OUTPUT: F-Output-1
**
*Output, field, variable=PRESELECT
*End Step
** ----------------------------------------------------------------
**
** STEP: Transient modal dynamics
**
*Step, name="Transient modal dynamics", nlgeom=NO, perturbation
Crane Response to Dropped Load
*Modal Dynamic, continue=NO
0.005, 0.5
*Modal Damping
1, 30, 0.05
**
** LOADS
**
** Name: Dyn load   Type: Concentrated force
*Cload, amplitude=Bounce
Tip-b, 2, -10000
**
** OUTPUT REQUESTS
**
**
** FIELD OUTPUT: F-Output-2
**
*Output, field, variable=PRESELECT, frequency=5
**
** HISTORY OUTPUT: H-Output-2
**
*Output, history
*Energy Output
ALLIE, ALLKE, ALLVD
**
** HISTORY OUTPUT: H-Output-4
**
*Node Output, nset=Attach
RF1, RF2, RF3, RM1, RM2, RM3
**
** HISTORY OUTPUT: H-Output-3
**
*Node Output, nset=Tip-a
U1, U2, U3
*End Step
